Xa := 8
Xb := 8
Xc := 7
Xd := 6
Xe := 3
Xf := 4
Xg := 3
Xh := Xa
Ya := 3
Yb := 8
Yc := 7
Yd := 8
Ye := 5
Yf := 4
Yg := 3
Yh := Ya
Xlw := 100
Ylw := 200
Xhw := 400
Yhw := 500
ϕ := 180
T(dx, dy) := [1, 0, -dx; 0, 1, -dy; 0, 0, 1]
R(ϕ) := [cos(ϕ), sin(ϕ), 0; -sin(ϕ), cos(ϕ), 0; 0, 0, 1]
ω := 1
ϕ_rad := π*ϕ/180
KD := [Xa, Xb, Xc, Xd, Xe, Xf, Xg, Xh; Ya, Yb, Yc, Yd, Ye, Yf, Yg, Yh; ω, ω, ω, ω, ω, ω, ω, ω]
XKD := transpose(KD)[:, 0]
YKD := transpose(KD)[:, 1]
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KDp := T(-Xa, -Ya)*R(ϕ_rad)*T(Xa, Ya)*KD
XKDp := transpose(KDp)[:, 0]
YKDp := transpose(KDp)[:, 1]
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Xl := min(XKDp) = 8
Yh := max(YKDp) = 3
Xh := max(XKDp) = 13
Yl := min(YKDp) = -2
dXw := Xhw - Xlw = 300
dX := Xh - Xl = 5
dYw := Yhw - Ylw = 300
dY := Yh - Yl = 5
Kx := dXw/dX = 60
Ky := dYw/dY = 60
Tsw := [Kx, 0, Xlw - Kx*Xl; 0, -Ky, Yhw + Ky*Yl; 0, 0, ω]
OKD := Tsw*KDp
X_OKD := transpose(OKD)[:, 0]
Y_OKD := (-transpose(OKD))[:, 1]
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