A := transpose([-4*15/3, -3*15/4, 1])
B := transpose([0, 3*15/4, 1])
C := transpose([4*15/3, -3*15/4, 1])
A1 := A
M := augment(A, B, C, A1)
M = [-20, 0, 20, -20; -11.25, 11.25, -11.25, -11.25; 1, 1, 1, 1]
X := transpose(M)[:, 0]
Y := transpose(M)[:, 1]
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Rot(ϕ) := [cos(ϕ), -sin(ϕ), 0; sin(ϕ), cos(ϕ), 0; 0, 0, 1]
ϕ_grad := 90
ϕ_rad := ϕ_grad*π/180
ϕ_rad = 1.5708
M1 := Rot(ϕ_rad)*M
X1 := transpose(M1)[:, 0]
Y1 := transpose(M1)[:, 1]
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M2 := Rot(ϕ_rad)*M1
X2 := transpose(M2)[:, 0]
Y2 := transpose(M2)[:, 1]
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M3 := Rot(ϕ_rad)*M2
X3 := transpose(M3)[:, 0]
Y3 := transpose(M3)[:, 1]
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