n := 15
x[0] := 6*n
y[0] := 6*n
y[1] := 8*n
x[1] := 6*n
y[2] := 6*n
x[3] := x[0]
y[3] := y[0]
x[2] := 8*n
A := transpose([x[0], y[0], 1])
B := transpose([x[1], y[1], 1])
C := transpose([x[2], y[2], 1])
A1 := transpose([x[0], y[0], 1])
φ := 90
dx := 2
dy := 3
φ_rad := π*φ/180
R(φ) := [cos(φ), sin(φ), 0; -sin(φ), cos(φ), 0; 0, 0, 1]
T(dx, dy) := [1, 0, -dx; 0, 1, -dy; 0, 0, 1]
K := [x[0], x[1], x[2]; y[0], y[1], y[2]; 1, 1, 1]
NK := T(-x[0], -y[0])*T(-dx, -dy)*R(φ_rad)*T(x[0], y[0])*K
x1[0] := NK[0, 0]
x1[1] := NK[0, 1]
x1[2] := NK[0, 2]
x1[3] := NK[0, 0]
y1[0] := NK[1, 0]
y1[1] := NK[1, 1]
y1[2] := NK[1, 2]
y1[3] := NK[1, 0]
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