n := 15
x[0] := 6*n
y[0] := 6*n
A := transpose([x[0], y[0], 1])
x[1] := 6*n
y[1] := 8*n
B := transpose([x[1], y[1], 1])
x[2] := 8*n
y[2] := 6*n
C := transpose([x[2], y[2], 1])
x[3] := x[0]
y[3] := y[0]
A1 := transpose([x[0], y[0], 1])
φ := 90
φ_rad := π*φ/180
K := [x[0], y[0], 1; x[1], y[1], 1; x[2], y[2], 1]
dx := 2
dy := 3
T(dx, dy) := [1, 0, 0; 0, 1, 0; -dx, -dy, 1]
R(φ) := [cos(φ), -sin(φ), 0; sin(φ), cos(φ), 0; 0, 0, 1]
K1 := K*T(x[0], y[0])
x1[0] := K1[0, 0]
x1[1] := K1[1, 0]
x1[2] := K1[2, 0]
x1[3] := x1[0]
y1[0] := K1[0, 1]
y1[1] := K1[1, 1]
y1[2] := K1[2, 1]
y1[3] := y1[0]
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K2 := K1*R(φ_rad)
x1[0] := K2[0, 0]
x1[1] := K2[1, 0]
x1[2] := K2[2, 0]
x1[3] := x1[0]
y1[0] := K2[0, 1]
y1[1] := K2[1, 1]
y1[2] := K2[2, 1]
y1[3] := y1[0]
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K3 := K2*T(-dx, -dy)
x1[0] := K3[0, 0]
x1[1] := K3[1, 0]
x1[2] := K3[2, 0]
x1[3] := x1[0]
y1[0] := K3[0, 1]
y1[1] := K3[1, 1]
y1[2] := K3[2, 1]
y1[3] := y1[0]
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K4 := K3*T(-x[0], -y[0])
x1[0] := K4[0, 0]
x1[1] := K4[1, 0]
x1[2] := K4[2, 0]
x1[3] := K4[0, 0]
y1[0] := K4[0, 1]
y1[1] := K4[1, 1]
y1[2] := K4[2, 1]
y1[3] := K4[0, 1]
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