n := 15
x[0] := 5*n
y[0] := 2*n
x[1] := 10*n
y[1] := 12*n
x[2] := 13*n
y[2] := 8*n
x_lw := 200
y_lw := 300
x_hw := 800
y_hw := 700
Z_x := transpose([x[0], x[1], x[2]])
Z_y := transpose([y[0], y[1], y[2]])
x_l := min(Z_x)
y_h := max(Z_y)
x_l = 75
y_h = 180
x_h := max(Z_x)
y_l := min(Z_y)
x_h = 195
y_l = 30
Δx_w := x_hw - x_lw = 600
Δx := x_h - x_l = 120
Δy_w := y_hw - y_lw = 400
Δy := y_h - y_l = 150
k_x := Δx_w/Δx = 5
k_y := Δy_w/Δy = 2.66667
T_sw := [k_x, 0, x_lw - k_x*x_l; 0, -k_y, y_hw + k_y*y_l; 0, 0, 1]
[x_aw; y_aw; ω] := T_sw*[x[0]; y[0]; 1] = [200; 700; 1]
[x_bw; y_bw; ω] := T_sw*[x[1]; y[1]; 1] = [575; 300; 1]
[x_cw; y_cw; ω] := T_sw*[x[2]; y[2]; 1] = [800; 460; 1]
M_ABC := [x[0], x[1], x[2]; y[0], y[1], y[2]; 1, 1, 1]
M_ABC_w := T_sw*M_ABC = [200, 575, 800; 700, 300, 460; 1, 1, 1]
V_Aw := M_ABC_w[:, 0] = [200; 700; 1]
V_Bw := M_ABC_w[:, 1] = [575; 300; 1]
V_Cw := M_ABC_w[:, 2] = [800; 460; 1]
X := transpose([x[0], x[1], x[2], x[0]])
Y := transpose([y[0], y[1], y[2], y[0]])
X_w := transpose([x_aw, x_bw, x_cw, x_aw])
Y_w := -transpose([y_aw, y_bw, y_cw, y_aw])
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