n := 15
x1 := -n
Xlw := 100
Ylw := 200
x2 := n
Xhw := 800
Yhw := 900
dX := 0.1
f(x) := sin(π*x)*sqrt(|x|)
N := round((x2 - x1)/dX) = 300
i := 0 .. N
X[i] := x1 + i*dX
Y[i] := f(X[i])
Z[i] := 1
Xl := min(X) = -15
Yh := max(Y) = 3.80789
Xh := max(X) = 15
Yl := min(Y) = -3.80789
M := stack(transpose(X), transpose(Y), transpose(Z))
dXw := Xhw - Xlw = 700
dx := Xh - Xl = 30
dYw := Yhw - Ylw = 700
dy := Yh - Yl = 7.61577
kx := dXw/dx = 23.3333
ky := dYw/dy = 91.9145
Tsw := [kx, 0, Xlw - kx*Xl; 0, -ky, Yhw + ky*Yl; 0, 0, 1] = [23.3333, 0, 450; 0, -91.9145, 550; 0, 0, 1]
Mw := Tsw*M
Xw := transpose(Mw)[:, 0]
Yw := -transpose(Mw)[:, 1]
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