n := 15
Xa := -2*n
Xb := -3*n
Xc := 0
Xd := 3*n
Xe := 2*n
Xf := -2*n
Xg := 2*n
Ya := -4*n
Yb := 0
Yc := 4*n
Yd := 0
Ye := -4*n
Yf := 0
Yg := 0
Xlw := 100
Ylw := 200
Xhw := 400
Yhw := 500
ϕ := 180
T(dx, dy) := [1, 0, -dx; 0, 1, -dy; 0, 0, 1]
R(ϕ) := [cos(ϕ), sin(ϕ), 0; -sin(ϕ), cos(ϕ), 0; 0, 0, 1]
ω := 1
ϕ_rad := π*ϕ/180
KD := [Xb, Xc, Xd, Xb, Xf, Xa, Xe, Xg; Yb, Yc, Yd, Yb, Yf, Ya, Ye, Yg; ω, ω, ω, ω, ω, ω, ω, ω]
XKD := transpose(KD)[:, 0]
YKD := transpose(KD)[:, 1]
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KDp := T(-Xc, -Yc)*R(ϕ_rad)*T(Xc, Yc)*KD
XKDp := transpose(KDp)[:, 0]
YKDp := transpose(KDp)[:, 1]
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Xl := min(XKDp) = -45
Yh := max(YKDp) = 180
Xh := max(XKDp) = 45
Yl := min(YKDp) = 60
dXw := Xhw - Xlw = 300
dX := Xh - Xl = 90
dYw := Yhw - Ylw = 300
dY := Yh - Yl = 120
Kx := dXw/dX = 3.33333
Ky := dYw/dY = 2.5
Tsw := [Kx, 0, Xlw - Kx*Xl; 0, -Ky, Yhw + Ky*Yl; 0, 0, ω]
OKD := Tsw*KDp
X_OKD := transpose(OKD)[:, 0]
Y_OKD := (-transpose(OKD))[:, 1]
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